# OpenSim document version 40600
ScaleTool theia2opensim-scaled:
  mass: 70 [kg]
  height: -1
  age: -1
  GenericModelMaker:
    model_file: D:\A_Work\A_Lab\D_Repos\Theia2OpenSim\sample_data\gait2392_simbody.osim
    marker_set_file: D:\A_Work\A_Lab\D_Repos\Theia2OpenSim\sample_data\markerstheia.xml
  ModelScaler:
    apply: true
    scaling_order: measurements
    marker_file: D:\A_Work\A_Lab\D_Repos\Theia2OpenSim\sample_data\OpenSim_output\Orientation_test_output\Static.trc
    time_range: 0 0.05
    preserve_mass_distribution: false
    output_model_file: D:\A_Work\A_Lab\D_Repos\Theia2OpenSim\sample_data\OpenSim_output\Orientation_test_output\scaled_model.osim
    MeasurementSet:
      Measurement pelvis: apply=true
        MarkerPair: markers=(LASIS RASIS)
        BodyScale pelvis: axes=(X Y Z)
      Measurement torso: apply=true
        MarkerPair: markers=(PELVIS HEAD)
        BodyScale torso: axes=(X Y Z)
      Measurement femur r: apply=true
        MarkerPair: markers=(RASIS RKNEE)
        BodyScale femur_r: axes=(X Y Z)
      Measurement femur l: apply=true
        MarkerPair: markers=(LASIS LKNEE)
        BodyScale femur_l: axes=(X Y Z)
      Measurement tibia r: apply=true
        MarkerPair: markers=(RKNEE RANKLE)
        BodyScale tibia_r: axes=(X Y Z)
      Measurement tibia l: apply=true
        MarkerPair: markers=(LKNEE LANKLE)
        BodyScale tibia_l: axes=(X Y Z)
      Measurement foot r: apply=true
        MarkerPair: markers=(RANKLE RTOE)
        BodyScale talus_r: axes=(X Y Z)
        BodyScale calcn_r: axes=(X Y Z)
        BodyScale toes_r: axes=(X Y Z)
      Measurement foot l: apply=true
        MarkerPair: markers=(LANKLE LTOE)
        BodyScale talus_l: axes=(X Y Z)
        BodyScale calcn_l: axes=(X Y Z)
        BodyScale toes_l: axes=(X Y Z)
  MarkerPlacer:
    apply: true
    marker_file: D:\A_Work\A_Lab\D_Repos\Theia2OpenSim\sample_data\OpenSim_output\Orientation_test_output\Static.trc
    coordinate_file: D:\A_Work\A_Lab\D_Repos\Theia2OpenSim\sample_data\OpenSim_output\Orientation_test_output\scaled_model_static_coords.mot
    time_range: 0 0.05
    output_motion_file: D:\A_Work\A_Lab\D_Repos\Theia2OpenSim\sample_data\OpenSim_output\Orientation_test_output\scaled_model_static_ik.mot
    output_model_file: D:\A_Work\A_Lab\D_Repos\Theia2OpenSim\sample_data\OpenSim_output\Orientation_test_output\scaled_model.osim
    max_marker_movement: -1
    IKTaskSet:
      IKMarkerTask LASIS: apply=true weight=5
      IKMarkerTask RASIS: apply=true weight=5
      IKMarkerTask RKNEE: apply=true weight=5
      IKMarkerTask LKNEE: apply=true weight=5
      IKMarkerTask RTOE: apply=true weight=5
      IKMarkerTask LANKLE: apply=true weight=5
      IKMarkerTask LTOE: apply=true weight=5
      IKMarkerTask RANKLE: apply=true weight=5
      IKMarkerTask PELVIS: apply=true weight=5
      IKMarkerTask HEAD: apply=true weight=5
      IKCoordinateTask [values shared by the 18 below unless stated]: apply=true weight=100 value_type=from_file
          value=0
      IKCoordinateTask pelvis_tilt
      IKCoordinateTask pelvis_list
      IKCoordinateTask pelvis_rotation
      IKCoordinateTask hip_flexion_r
      IKCoordinateTask hip_adduction_r
      IKCoordinateTask hip_rotation_r
      IKCoordinateTask knee_angle_r
      IKCoordinateTask ankle_angle_r
      IKCoordinateTask subtalar_angle_r: value_type=default_value
      IKCoordinateTask hip_flexion_l
      IKCoordinateTask hip_adduction_l
      IKCoordinateTask hip_rotation_l
      IKCoordinateTask knee_angle_l
      IKCoordinateTask ankle_angle_l
      IKCoordinateTask subtalar_angle_l: value_type=default_value
      IKCoordinateTask lumbar_extension
      IKCoordinateTask lumbar_bending
      IKCoordinateTask lumbar_rotation
