# OpenSim document version 40500
ScaleTool 3DGaitModel2392-scaled:
  mass: 75.1646 [kg]
  height: -1
  age: -1
  ModelScaler:
    apply: true
    scaling_order: measurements
    marker_file: Static2_JCs.trc
    time_range: 0 0.02
    preserve_mass_distribution: false
    MeasurementSet:
      Measurement pelvis: apply=true
        MarkerPair: markers=(LASIS RASIS)
        BodyScale pelvis: axes=(X Y Z)
      Measurement torso: apply=true
        MarkerPair: markers=(PELVIS HEAD)
        BodyScale torso: axes=(X Y Z)
      Measurement femur r: apply=true
        MarkerPair: markers=(RASIS RKNEE)
        BodyScale femur_r: axes=(X Y Z)
      Measurement femur l: apply=true
        MarkerPair: markers=(LASIS LKNEE)
        BodyScale femur_l: axes=(X Y Z)
      Measurement tibia r: apply=true
        MarkerPair: markers=(RKNEE RANKLE)
        BodyScale tibia_r: axes=(X Y Z)
      Measurement tibia l: apply=true
        MarkerPair: markers=(LKNEE LANKLE)
        BodyScale tibia_l: axes=(X Y Z)
      Measurement foot r: apply=true
        MarkerPair: markers=(RANKLE RTOE)
        BodyScale talus_r: axes=(X Y Z)
        BodyScale calcn_r: axes=(X Y Z)
        BodyScale toes_r: axes=(X Y Z)
      Measurement foot l: apply=true
        MarkerPair: markers=(LANKLE LTOE)
        BodyScale talus_l: axes=(X Y Z)
        BodyScale calcn_l: axes=(X Y Z)
        BodyScale toes_l: axes=(X Y Z)
  MarkerPlacer:
    apply: true
    marker_file: Static2_JCs.trc
    coordinate_file: Static2TheiaAngles.mot
    time_range: 0 0.02
    max_marker_movement: -1
    IKTaskSet:
      IKMarkerTask LASIS: apply=true weight=5
      IKMarkerTask RASIS: apply=true weight=5
      IKMarkerTask RKNEE: apply=true weight=5
      IKMarkerTask LKNEE: apply=true weight=5
      IKMarkerTask RTOE: apply=true weight=5
      IKMarkerTask LANKLE: apply=true weight=5
      IKMarkerTask LTOE: apply=true weight=5
      IKMarkerTask RANKLE: apply=true weight=5
      IKMarkerTask PELVIS: apply=true weight=5
      IKMarkerTask HEAD: apply=true weight=5
      IKCoordinateTask [values shared by the 18 below unless stated]: apply=true weight=100 value_type=from_file
          value=0
      IKCoordinateTask pelvis_tilt
      IKCoordinateTask pelvis_list
      IKCoordinateTask pelvis_rotation
      IKCoordinateTask hip_flexion_r
      IKCoordinateTask hip_adduction_r
      IKCoordinateTask hip_rotation_r
      IKCoordinateTask knee_angle_r
      IKCoordinateTask ankle_angle_r
      IKCoordinateTask subtalar_angle_r
      IKCoordinateTask hip_flexion_l
      IKCoordinateTask hip_adduction_l
      IKCoordinateTask hip_rotation_l
      IKCoordinateTask knee_angle_l
      IKCoordinateTask ankle_angle_l
      IKCoordinateTask subtalar_angle_l
      IKCoordinateTask lumbar_extension
      IKCoordinateTask lumbar_bending
      IKCoordinateTask lumbar_rotation
