# OpenSim document version 40500
MarkerSet:
  Marker RASIS: pelvis (-0.0760299 -0.0606629 -0.0874144)
  Marker LASIS: pelvis (-0.07602993 -0.06066289 0.08078953)
  Marker RKNEE: femur_r (0.0121926 -0.400841 -0.002948)
  Marker LKNEE: femur_l (0.01219264 -0.4008408 -0.002948018)
  Marker RTOE: toes_r (-0.002448833 0.002698057 0.008278505)
  Marker LANKLE: calcn_l (0.0450227 0.059654 -0.0154857)
  Marker LTOE: toes_l (-0.00244883 0.00269806 -0.0147538)
  Marker RANKLE: calcn_r (0.04502272 0.05965399 0.01200528) fixed=true
  Marker HEAD: torso (0.0049 0.4655 0.0114)
  Marker PELVIS: pelvis (-0.08243917 0.02468448 -0.001126916)
